// SBML level 3 version 2

model cell_model()
  // model units - substance: mole, time: second, volume: litre, area: square_metre, length: metre, extent: mole

  // Compartments:
  compartment cell = 1e-6 litre;

  // Species:
  species x in cell = 10;  // substance in count
  species y in cell = 100;  // substance in count
  species c1 in cell = 0;  // substance in count

  // Parameters:
  kc = 10.96405 per_second;
  k1 = 0.6270364 per_second;

  // Reactions:
  r1: x + y => c1; kc*x*y;
  r2: c1 => ; k1*c1;

  // Unit definitions:
  unit square_metre = metre^2;
  unit per_second = 1 / second;
  unit count = 1 / dimensionless;
end
